Sat 03/29/2025
03:05 PM
$PROBLEM    1cmt_iv_map_est
$INPUT      ID TIME EVID AMT RATE DV MDV
$DATA      sim_data_ID5.csv IGNORE=@
$SUBROUTINE ADVAN1 TRANS2
$PK
; define fixed effects parameters
CL = THETA(1) * EXP(ETA(1))
V = THETA(2)

; scaling
S1=V

$THETA  0.247 FIX ; 1 TVCL
 3.15 FIX ; 2 TVV
$OMEGA  0.11  FIX  ;    1 OM_CL
$SIGMA  10  FIX  ;  1 SIG_ADD
$ERROR
; add additive error
IPRED = F
Y = IPRED + EPS(1)

; store error for table output
ERR1 = EPS(1)

$ESTIMATION METHOD=COND LAPLACIAN MAXEVAL=0 SIGDIG=3 PRINT=1 NOABORT
            POSTHOC
$TABLE      ID TIME EVID AMT RATE DV PRED IPRED MDV ETA1 ERR1 CL
            NOAPPEND ONEHEADER NOPRINT FILE=map_estim_out

NM-TRAN MESSAGES
 WARNINGS AND ERRORS (IF ANY) FOR PROBLEM    1
 (WARNING  2) NM-TRAN INFERS THAT THE DATA ARE POPULATION.

1NONLINEAR MIXED EFFECTS MODEL PROGRAM (NONMEM) VERSION 7.5.1
 ORIGINALLY DEVELOPED BY STUART BEAL, LEWIS SHEINER, AND ALISON BOECKMANN
 CURRENT DEVELOPERS ARE ROBERT BAUER, ICON DEVELOPMENT SOLUTIONS,
 AND ALISON BOECKMANN. IMPLEMENTATION, EFFICIENCY, AND STANDARDIZATION
 PERFORMED BY NOUS INFOSYSTEMS.
 PROBLEM NO.:         1
 1cmt_iv_map_est
 TOT. NO. OF OBS RECS:        5
 TOT. NO. OF INDIVIDUALS:        1
 ONE COMPARTMENT MODEL (ADVAN1)
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 #TBLN:      1
 #METH: Laplacian Conditional Estimation (Evaluation)
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 Elapsed evaluation time in seconds:     0.01
 Elapsed postprocess time in seconds:     0.00

 ********************                  LAPLACIAN CONDITIONAL ESTIMATION (EVALUATION)                 ********************
 #OBJT:**************                       MINIMUM VALUE OF OBJECTIVE FUNCTION                      ********************
 #OBJV:********************************************       16.779       **************************************************

 ********************                  LAPLACIAN CONDITIONAL ESTIMATION (EVALUATION)                 ********************
 ********************                             FINAL PARAMETER ESTIMATE                           ********************

 THETA - VECTOR OF FIXED EFFECTS PARAMETERS   *********
         TH 1      TH 2
         2.47E-01  3.15E+00

 OMEGA - COV MATRIX FOR RANDOM EFFECTS - ETAS  ********
         ETA1
 ETA1
+        1.10E-01

 SIGMA - COV MATRIX FOR RANDOM EFFECTS - EPSILONS  ****
         EPS1
 EPS1
+        1.00E+01

 OMEGA - CORR MATRIX FOR RANDOM EFFECTS - ETAS  *******
         ETA1
 ETA1
+        3.32E-01

 SIGMA - CORR MATRIX FOR RANDOM EFFECTS - EPSILONS  ***
         EPS1
 EPS1
+        3.16E+00
 Elapsed finaloutput time in seconds:     0.00
 #CPUT: Total CPU Time in Seconds,        0.000
